<Lems>

    <!--

        This LEMS file has been automatically generated using PyNeuroML v0.3.8 (libNeuroML v0.2.37)

     -->

    <!-- Specify which component to run -->
    <Target component="Sim_HybridTut"/>

    <!-- Include core NeuroML2 ComponentType definitions -->
    <Include file="Cells.xml"/>
    <Include file="Networks.xml"/>
    <Include file="Simulation.xml"/>

    <Include file="HybridTut.net.nml"/>

    <Simulation id="Sim_HybridTut" length="1000.0ms" step="0.01ms" target="HybridTut" seed="12345">  <!-- Note seed: ensures same random numbers used every run -->

        <Display id="DispPop__PYR_HH" title="Membrane potentials of cells in PYR_HH" timeScale="1ms" xmin="-100.0" xmax="1100.0" ymin="-90" ymax="50">
            <Line id="PYR_HH[0]: v" quantity="PYR_HH/0/CELL_HH_PYR/v" scale="1mV" color="#091d9a" timeScale="1ms"/>
            <Line id="PYR_HH[1]: v" quantity="PYR_HH/1/CELL_HH_PYR/v" scale="1mV" color="#6d723d" timeScale="1ms"/>
            <Line id="PYR_HH[2]: v" quantity="PYR_HH/2/CELL_HH_PYR/v" scale="1mV" color="#923add" timeScale="1ms"/>
            <Line id="PYR_HH[3]: v" quantity="PYR_HH/3/CELL_HH_PYR/v" scale="1mV" color="#778c74" timeScale="1ms"/>
            <Line id="PYR_HH[4]: v" quantity="PYR_HH/4/CELL_HH_PYR/v" scale="1mV" color="#564c01" timeScale="1ms"/>
            <Line id="PYR_HH[5]: v" quantity="PYR_HH/5/CELL_HH_PYR/v" scale="1mV" color="#017ba8" timeScale="1ms"/>
            <Line id="PYR_HH[6]: v" quantity="PYR_HH/6/CELL_HH_PYR/v" scale="1mV" color="#e2fbea" timeScale="1ms"/>
            <Line id="PYR_HH[7]: v" quantity="PYR_HH/7/CELL_HH_PYR/v" scale="1mV" color="#443253" timeScale="1ms"/>
            <Line id="PYR_HH[8]: v" quantity="PYR_HH/8/CELL_HH_PYR/v" scale="1mV" color="#20593a" timeScale="1ms"/>
            <Line id="PYR_HH[9]: v" quantity="PYR_HH/9/CELL_HH_PYR/v" scale="1mV" color="#49a201" timeScale="1ms"/>
            <Line id="PYR_HH[10]: v" quantity="PYR_HH/10/CELL_HH_PYR/v" scale="1mV" color="#ae9bac" timeScale="1ms"/>
            <Line id="PYR_HH[11]: v" quantity="PYR_HH/11/CELL_HH_PYR/v" scale="1mV" color="#78caf7" timeScale="1ms"/>
            <Line id="PYR_HH[12]: v" quantity="PYR_HH/12/CELL_HH_PYR/v" scale="1mV" color="#9ab794" timeScale="1ms"/>
            <Line id="PYR_HH[13]: v" quantity="PYR_HH/13/CELL_HH_PYR/v" scale="1mV" color="#7620c6" timeScale="1ms"/>
            <Line id="PYR_HH[14]: v" quantity="PYR_HH/14/CELL_HH_PYR/v" scale="1mV" color="#560297" timeScale="1ms"/>
            <Line id="PYR_HH[15]: v" quantity="PYR_HH/15/CELL_HH_PYR/v" scale="1mV" color="#d31487" timeScale="1ms"/>
            <Line id="PYR_HH[16]: v" quantity="PYR_HH/16/CELL_HH_PYR/v" scale="1mV" color="#dde48d" timeScale="1ms"/>
            <Line id="PYR_HH[17]: v" quantity="PYR_HH/17/CELL_HH_PYR/v" scale="1mV" color="#215dae" timeScale="1ms"/>
            <Line id="PYR_HH[18]: v" quantity="PYR_HH/18/CELL_HH_PYR/v" scale="1mV" color="#38628b" timeScale="1ms"/>
            <Line id="PYR_HH[19]: v" quantity="PYR_HH/19/CELL_HH_PYR/v" scale="1mV" color="#2c7a9f" timeScale="1ms"/>
            <Line id="PYR_HH[20]: v" quantity="PYR_HH/20/CELL_HH_PYR/v" scale="1mV" color="#b31033" timeScale="1ms"/>
            <Line id="PYR_HH[21]: v" quantity="PYR_HH/21/CELL_HH_PYR/v" scale="1mV" color="#8c9811" timeScale="1ms"/>
            <Line id="PYR_HH[22]: v" quantity="PYR_HH/22/CELL_HH_PYR/v" scale="1mV" color="#764a72" timeScale="1ms"/>
            <Line id="PYR_HH[23]: v" quantity="PYR_HH/23/CELL_HH_PYR/v" scale="1mV" color="#7a7db2" timeScale="1ms"/>
            <Line id="PYR_HH[24]: v" quantity="PYR_HH/24/CELL_HH_PYR/v" scale="1mV" color="#8338d6" timeScale="1ms"/>
            <Line id="PYR_HH[25]: v" quantity="PYR_HH/25/CELL_HH_PYR/v" scale="1mV" color="#d044bb" timeScale="1ms"/>
            <Line id="PYR_HH[26]: v" quantity="PYR_HH/26/CELL_HH_PYR/v" scale="1mV" color="#1f42e7" timeScale="1ms"/>
            <Line id="PYR_HH[27]: v" quantity="PYR_HH/27/CELL_HH_PYR/v" scale="1mV" color="#93c6d3" timeScale="1ms"/>
            <Line id="PYR_HH[28]: v" quantity="PYR_HH/28/CELL_HH_PYR/v" scale="1mV" color="#e0aa25" timeScale="1ms"/>
            <Line id="PYR_HH[29]: v" quantity="PYR_HH/29/CELL_HH_PYR/v" scale="1mV" color="#498aa0" timeScale="1ms"/>
            <Line id="PYR_HH[30]: v" quantity="PYR_HH/30/CELL_HH_PYR/v" scale="1mV" color="#cfec2f" timeScale="1ms"/>
            <Line id="PYR_HH[31]: v" quantity="PYR_HH/31/CELL_HH_PYR/v" scale="1mV" color="#c04245" timeScale="1ms"/>
            <Line id="PYR_HH[32]: v" quantity="PYR_HH/32/CELL_HH_PYR/v" scale="1mV" color="#c798c6" timeScale="1ms"/>
            <Line id="PYR_HH[33]: v" quantity="PYR_HH/33/CELL_HH_PYR/v" scale="1mV" color="#978434" timeScale="1ms"/>
            <Line id="PYR_HH[34]: v" quantity="PYR_HH/34/CELL_HH_PYR/v" scale="1mV" color="#f1323d" timeScale="1ms"/>
            <Line id="PYR_HH[35]: v" quantity="PYR_HH/35/CELL_HH_PYR/v" scale="1mV" color="#656a1f" timeScale="1ms"/>
            <Line id="PYR_HH[36]: v" quantity="PYR_HH/36/CELL_HH_PYR/v" scale="1mV" color="#5245f4" timeScale="1ms"/>
            <Line id="PYR_HH[37]: v" quantity="PYR_HH/37/CELL_HH_PYR/v" scale="1mV" color="#2a7ad1" timeScale="1ms"/>
            <Line id="PYR_HH[38]: v" quantity="PYR_HH/38/CELL_HH_PYR/v" scale="1mV" color="#599eb3" timeScale="1ms"/>
            <Line id="PYR_HH[39]: v" quantity="PYR_HH/39/CELL_HH_PYR/v" scale="1mV" color="#2e6cdf" timeScale="1ms"/>
            <Line id="PYR_HH[40]: v" quantity="PYR_HH/40/CELL_HH_PYR/v" scale="1mV" color="#a50d61" timeScale="1ms"/>
            <Line id="PYR_HH[41]: v" quantity="PYR_HH/41/CELL_HH_PYR/v" scale="1mV" color="#b92cbd" timeScale="1ms"/>
            <Line id="PYR_HH[42]: v" quantity="PYR_HH/42/CELL_HH_PYR/v" scale="1mV" color="#ebb18a" timeScale="1ms"/>
            <Line id="PYR_HH[43]: v" quantity="PYR_HH/43/CELL_HH_PYR/v" scale="1mV" color="#8bc5b1" timeScale="1ms"/>
            <Line id="PYR_HH[44]: v" quantity="PYR_HH/44/CELL_HH_PYR/v" scale="1mV" color="#226be4" timeScale="1ms"/>
            <Line id="PYR_HH[45]: v" quantity="PYR_HH/45/CELL_HH_PYR/v" scale="1mV" color="#42756b" timeScale="1ms"/>
            <Line id="PYR_HH[46]: v" quantity="PYR_HH/46/CELL_HH_PYR/v" scale="1mV" color="#8b7ee5" timeScale="1ms"/>
            <Line id="PYR_HH[47]: v" quantity="PYR_HH/47/CELL_HH_PYR/v" scale="1mV" color="#b2da0d" timeScale="1ms"/>
            <Line id="PYR_HH[48]: v" quantity="PYR_HH/48/CELL_HH_PYR/v" scale="1mV" color="#b34637" timeScale="1ms"/>
            <Line id="PYR_HH[49]: v" quantity="PYR_HH/49/CELL_HH_PYR/v" scale="1mV" color="#f0f90b" timeScale="1ms"/>
        </Display>

        <Display id="DispPop__PYR_Izhi" title="Membrane potentials of cells in PYR_Izhi" timeScale="1ms" xmin="-100.0" xmax="1100.0" ymin="-90" ymax="50">
            <Line id="PYR_Izhi[0]: v" quantity="PYR_Izhi/0/CELL_Izhi_PYR/v" scale="1mV" color="#acbee6" timeScale="1ms"/>
            <Line id="PYR_Izhi[1]: v" quantity="PYR_Izhi/1/CELL_Izhi_PYR/v" scale="1mV" color="#9eb158" timeScale="1ms"/>
            <Line id="PYR_Izhi[2]: v" quantity="PYR_Izhi/2/CELL_Izhi_PYR/v" scale="1mV" color="#87264b" timeScale="1ms"/>
            <Line id="PYR_Izhi[3]: v" quantity="PYR_Izhi/3/CELL_Izhi_PYR/v" scale="1mV" color="#4a6d19" timeScale="1ms"/>
            <Line id="PYR_Izhi[4]: v" quantity="PYR_Izhi/4/CELL_Izhi_PYR/v" scale="1mV" color="#2e10f0" timeScale="1ms"/>
            <Line id="PYR_Izhi[5]: v" quantity="PYR_Izhi/5/CELL_Izhi_PYR/v" scale="1mV" color="#30d66f" timeScale="1ms"/>
            <Line id="PYR_Izhi[6]: v" quantity="PYR_Izhi/6/CELL_Izhi_PYR/v" scale="1mV" color="#7eba8d" timeScale="1ms"/>
            <Line id="PYR_Izhi[7]: v" quantity="PYR_Izhi/7/CELL_Izhi_PYR/v" scale="1mV" color="#385889" timeScale="1ms"/>
            <Line id="PYR_Izhi[8]: v" quantity="PYR_Izhi/8/CELL_Izhi_PYR/v" scale="1mV" color="#7ef9f8" timeScale="1ms"/>
            <Line id="PYR_Izhi[9]: v" quantity="PYR_Izhi/9/CELL_Izhi_PYR/v" scale="1mV" color="#6537f0" timeScale="1ms"/>
            <Line id="PYR_Izhi[10]: v" quantity="PYR_Izhi/10/CELL_Izhi_PYR/v" scale="1mV" color="#6444d3" timeScale="1ms"/>
            <Line id="PYR_Izhi[11]: v" quantity="PYR_Izhi/11/CELL_Izhi_PYR/v" scale="1mV" color="#563c9c" timeScale="1ms"/>
            <Line id="PYR_Izhi[12]: v" quantity="PYR_Izhi/12/CELL_Izhi_PYR/v" scale="1mV" color="#6e8bfb" timeScale="1ms"/>
            <Line id="PYR_Izhi[13]: v" quantity="PYR_Izhi/13/CELL_Izhi_PYR/v" scale="1mV" color="#fbaab7" timeScale="1ms"/>
            <Line id="PYR_Izhi[14]: v" quantity="PYR_Izhi/14/CELL_Izhi_PYR/v" scale="1mV" color="#464184" timeScale="1ms"/>
            <Line id="PYR_Izhi[15]: v" quantity="PYR_Izhi/15/CELL_Izhi_PYR/v" scale="1mV" color="#247f68" timeScale="1ms"/>
            <Line id="PYR_Izhi[16]: v" quantity="PYR_Izhi/16/CELL_Izhi_PYR/v" scale="1mV" color="#3dec99" timeScale="1ms"/>
            <Line id="PYR_Izhi[17]: v" quantity="PYR_Izhi/17/CELL_Izhi_PYR/v" scale="1mV" color="#3d8bcd" timeScale="1ms"/>
            <Line id="PYR_Izhi[18]: v" quantity="PYR_Izhi/18/CELL_Izhi_PYR/v" scale="1mV" color="#6ce0a8" timeScale="1ms"/>
            <Line id="PYR_Izhi[19]: v" quantity="PYR_Izhi/19/CELL_Izhi_PYR/v" scale="1mV" color="#9d2b09" timeScale="1ms"/>
            <Line id="PYR_Izhi[20]: v" quantity="PYR_Izhi/20/CELL_Izhi_PYR/v" scale="1mV" color="#25ddfc" timeScale="1ms"/>
            <Line id="PYR_Izhi[21]: v" quantity="PYR_Izhi/21/CELL_Izhi_PYR/v" scale="1mV" color="#e12236" timeScale="1ms"/>
            <Line id="PYR_Izhi[22]: v" quantity="PYR_Izhi/22/CELL_Izhi_PYR/v" scale="1mV" color="#2a89a6" timeScale="1ms"/>
            <Line id="PYR_Izhi[23]: v" quantity="PYR_Izhi/23/CELL_Izhi_PYR/v" scale="1mV" color="#c26d59" timeScale="1ms"/>
            <Line id="PYR_Izhi[24]: v" quantity="PYR_Izhi/24/CELL_Izhi_PYR/v" scale="1mV" color="#655734" timeScale="1ms"/>
            <Line id="PYR_Izhi[25]: v" quantity="PYR_Izhi/25/CELL_Izhi_PYR/v" scale="1mV" color="#d4d1b9" timeScale="1ms"/>
            <Line id="PYR_Izhi[26]: v" quantity="PYR_Izhi/26/CELL_Izhi_PYR/v" scale="1mV" color="#f2493c" timeScale="1ms"/>
            <Line id="PYR_Izhi[27]: v" quantity="PYR_Izhi/27/CELL_Izhi_PYR/v" scale="1mV" color="#93a029" timeScale="1ms"/>
            <Line id="PYR_Izhi[28]: v" quantity="PYR_Izhi/28/CELL_Izhi_PYR/v" scale="1mV" color="#c391f1" timeScale="1ms"/>
            <Line id="PYR_Izhi[29]: v" quantity="PYR_Izhi/29/CELL_Izhi_PYR/v" scale="1mV" color="#fb2a97" timeScale="1ms"/>
            <Line id="PYR_Izhi[30]: v" quantity="PYR_Izhi/30/CELL_Izhi_PYR/v" scale="1mV" color="#dcacc7" timeScale="1ms"/>
            <Line id="PYR_Izhi[31]: v" quantity="PYR_Izhi/31/CELL_Izhi_PYR/v" scale="1mV" color="#c9f276" timeScale="1ms"/>
            <Line id="PYR_Izhi[32]: v" quantity="PYR_Izhi/32/CELL_Izhi_PYR/v" scale="1mV" color="#ae07e8" timeScale="1ms"/>
            <Line id="PYR_Izhi[33]: v" quantity="PYR_Izhi/33/CELL_Izhi_PYR/v" scale="1mV" color="#72073d" timeScale="1ms"/>
            <Line id="PYR_Izhi[34]: v" quantity="PYR_Izhi/34/CELL_Izhi_PYR/v" scale="1mV" color="#53e353" timeScale="1ms"/>
            <Line id="PYR_Izhi[35]: v" quantity="PYR_Izhi/35/CELL_Izhi_PYR/v" scale="1mV" color="#87c84f" timeScale="1ms"/>
            <Line id="PYR_Izhi[36]: v" quantity="PYR_Izhi/36/CELL_Izhi_PYR/v" scale="1mV" color="#50facd" timeScale="1ms"/>
            <Line id="PYR_Izhi[37]: v" quantity="PYR_Izhi/37/CELL_Izhi_PYR/v" scale="1mV" color="#b32522" timeScale="1ms"/>
            <Line id="PYR_Izhi[38]: v" quantity="PYR_Izhi/38/CELL_Izhi_PYR/v" scale="1mV" color="#3cf793" timeScale="1ms"/>
            <Line id="PYR_Izhi[39]: v" quantity="PYR_Izhi/39/CELL_Izhi_PYR/v" scale="1mV" color="#be1c1c" timeScale="1ms"/>
            <Line id="PYR_Izhi[40]: v" quantity="PYR_Izhi/40/CELL_Izhi_PYR/v" scale="1mV" color="#bf5563" timeScale="1ms"/>
            <Line id="PYR_Izhi[41]: v" quantity="PYR_Izhi/41/CELL_Izhi_PYR/v" scale="1mV" color="#63430d" timeScale="1ms"/>
            <Line id="PYR_Izhi[42]: v" quantity="PYR_Izhi/42/CELL_Izhi_PYR/v" scale="1mV" color="#6634dd" timeScale="1ms"/>
            <Line id="PYR_Izhi[43]: v" quantity="PYR_Izhi/43/CELL_Izhi_PYR/v" scale="1mV" color="#2fe69e" timeScale="1ms"/>
            <Line id="PYR_Izhi[44]: v" quantity="PYR_Izhi/44/CELL_Izhi_PYR/v" scale="1mV" color="#059105" timeScale="1ms"/>
            <Line id="PYR_Izhi[45]: v" quantity="PYR_Izhi/45/CELL_Izhi_PYR/v" scale="1mV" color="#dbf859" timeScale="1ms"/>
            <Line id="PYR_Izhi[46]: v" quantity="PYR_Izhi/46/CELL_Izhi_PYR/v" scale="1mV" color="#06c37b" timeScale="1ms"/>
            <Line id="PYR_Izhi[47]: v" quantity="PYR_Izhi/47/CELL_Izhi_PYR/v" scale="1mV" color="#b6f5eb" timeScale="1ms"/>
            <Line id="PYR_Izhi[48]: v" quantity="PYR_Izhi/48/CELL_Izhi_PYR/v" scale="1mV" color="#1e4d2d" timeScale="1ms"/>
            <Line id="PYR_Izhi[49]: v" quantity="PYR_Izhi/49/CELL_Izhi_PYR/v" scale="1mV" color="#053868" timeScale="1ms"/>
        </Display>

        <OutputFile id="Volts_file__PYR_HH" fileName="Sim_HybridTut.PYR_HH.v.dat">
            <OutputColumn id="v_PYR_HH_0_CELL_HH_PYR_v" quantity="PYR_HH/0/CELL_HH_PYR/v"/>
            <OutputColumn id="v_PYR_HH_1_CELL_HH_PYR_v" quantity="PYR_HH/1/CELL_HH_PYR/v"/>
            <OutputColumn id="v_PYR_HH_2_CELL_HH_PYR_v" quantity="PYR_HH/2/CELL_HH_PYR/v"/>
            <OutputColumn id="v_PYR_HH_3_CELL_HH_PYR_v" quantity="PYR_HH/3/CELL_HH_PYR/v"/>
            <OutputColumn id="v_PYR_HH_4_CELL_HH_PYR_v" quantity="PYR_HH/4/CELL_HH_PYR/v"/>
            <OutputColumn id="v_PYR_HH_5_CELL_HH_PYR_v" quantity="PYR_HH/5/CELL_HH_PYR/v"/>
            <OutputColumn id="v_PYR_HH_6_CELL_HH_PYR_v" quantity="PYR_HH/6/CELL_HH_PYR/v"/>
            <OutputColumn id="v_PYR_HH_7_CELL_HH_PYR_v" quantity="PYR_HH/7/CELL_HH_PYR/v"/>
            <OutputColumn id="v_PYR_HH_8_CELL_HH_PYR_v" quantity="PYR_HH/8/CELL_HH_PYR/v"/>
            <OutputColumn id="v_PYR_HH_9_CELL_HH_PYR_v" quantity="PYR_HH/9/CELL_HH_PYR/v"/>
            <OutputColumn id="v_PYR_HH_10_CELL_HH_PYR_v" quantity="PYR_HH/10/CELL_HH_PYR/v"/>
            <OutputColumn id="v_PYR_HH_11_CELL_HH_PYR_v" quantity="PYR_HH/11/CELL_HH_PYR/v"/>
            <OutputColumn id="v_PYR_HH_12_CELL_HH_PYR_v" quantity="PYR_HH/12/CELL_HH_PYR/v"/>
            <OutputColumn id="v_PYR_HH_13_CELL_HH_PYR_v" quantity="PYR_HH/13/CELL_HH_PYR/v"/>
            <OutputColumn id="v_PYR_HH_14_CELL_HH_PYR_v" quantity="PYR_HH/14/CELL_HH_PYR/v"/>
            <OutputColumn id="v_PYR_HH_15_CELL_HH_PYR_v" quantity="PYR_HH/15/CELL_HH_PYR/v"/>
            <OutputColumn id="v_PYR_HH_16_CELL_HH_PYR_v" quantity="PYR_HH/16/CELL_HH_PYR/v"/>
            <OutputColumn id="v_PYR_HH_17_CELL_HH_PYR_v" quantity="PYR_HH/17/CELL_HH_PYR/v"/>
            <OutputColumn id="v_PYR_HH_18_CELL_HH_PYR_v" quantity="PYR_HH/18/CELL_HH_PYR/v"/>
            <OutputColumn id="v_PYR_HH_19_CELL_HH_PYR_v" quantity="PYR_HH/19/CELL_HH_PYR/v"/>
            <OutputColumn id="v_PYR_HH_20_CELL_HH_PYR_v" quantity="PYR_HH/20/CELL_HH_PYR/v"/>
            <OutputColumn id="v_PYR_HH_21_CELL_HH_PYR_v" quantity="PYR_HH/21/CELL_HH_PYR/v"/>
            <OutputColumn id="v_PYR_HH_22_CELL_HH_PYR_v" quantity="PYR_HH/22/CELL_HH_PYR/v"/>
            <OutputColumn id="v_PYR_HH_23_CELL_HH_PYR_v" quantity="PYR_HH/23/CELL_HH_PYR/v"/>
            <OutputColumn id="v_PYR_HH_24_CELL_HH_PYR_v" quantity="PYR_HH/24/CELL_HH_PYR/v"/>
            <OutputColumn id="v_PYR_HH_25_CELL_HH_PYR_v" quantity="PYR_HH/25/CELL_HH_PYR/v"/>
            <OutputColumn id="v_PYR_HH_26_CELL_HH_PYR_v" quantity="PYR_HH/26/CELL_HH_PYR/v"/>
            <OutputColumn id="v_PYR_HH_27_CELL_HH_PYR_v" quantity="PYR_HH/27/CELL_HH_PYR/v"/>
            <OutputColumn id="v_PYR_HH_28_CELL_HH_PYR_v" quantity="PYR_HH/28/CELL_HH_PYR/v"/>
            <OutputColumn id="v_PYR_HH_29_CELL_HH_PYR_v" quantity="PYR_HH/29/CELL_HH_PYR/v"/>
            <OutputColumn id="v_PYR_HH_30_CELL_HH_PYR_v" quantity="PYR_HH/30/CELL_HH_PYR/v"/>
            <OutputColumn id="v_PYR_HH_31_CELL_HH_PYR_v" quantity="PYR_HH/31/CELL_HH_PYR/v"/>
            <OutputColumn id="v_PYR_HH_32_CELL_HH_PYR_v" quantity="PYR_HH/32/CELL_HH_PYR/v"/>
            <OutputColumn id="v_PYR_HH_33_CELL_HH_PYR_v" quantity="PYR_HH/33/CELL_HH_PYR/v"/>
            <OutputColumn id="v_PYR_HH_34_CELL_HH_PYR_v" quantity="PYR_HH/34/CELL_HH_PYR/v"/>
            <OutputColumn id="v_PYR_HH_35_CELL_HH_PYR_v" quantity="PYR_HH/35/CELL_HH_PYR/v"/>
            <OutputColumn id="v_PYR_HH_36_CELL_HH_PYR_v" quantity="PYR_HH/36/CELL_HH_PYR/v"/>
            <OutputColumn id="v_PYR_HH_37_CELL_HH_PYR_v" quantity="PYR_HH/37/CELL_HH_PYR/v"/>
            <OutputColumn id="v_PYR_HH_38_CELL_HH_PYR_v" quantity="PYR_HH/38/CELL_HH_PYR/v"/>
            <OutputColumn id="v_PYR_HH_39_CELL_HH_PYR_v" quantity="PYR_HH/39/CELL_HH_PYR/v"/>
            <OutputColumn id="v_PYR_HH_40_CELL_HH_PYR_v" quantity="PYR_HH/40/CELL_HH_PYR/v"/>
            <OutputColumn id="v_PYR_HH_41_CELL_HH_PYR_v" quantity="PYR_HH/41/CELL_HH_PYR/v"/>
            <OutputColumn id="v_PYR_HH_42_CELL_HH_PYR_v" quantity="PYR_HH/42/CELL_HH_PYR/v"/>
            <OutputColumn id="v_PYR_HH_43_CELL_HH_PYR_v" quantity="PYR_HH/43/CELL_HH_PYR/v"/>
            <OutputColumn id="v_PYR_HH_44_CELL_HH_PYR_v" quantity="PYR_HH/44/CELL_HH_PYR/v"/>
            <OutputColumn id="v_PYR_HH_45_CELL_HH_PYR_v" quantity="PYR_HH/45/CELL_HH_PYR/v"/>
            <OutputColumn id="v_PYR_HH_46_CELL_HH_PYR_v" quantity="PYR_HH/46/CELL_HH_PYR/v"/>
            <OutputColumn id="v_PYR_HH_47_CELL_HH_PYR_v" quantity="PYR_HH/47/CELL_HH_PYR/v"/>
            <OutputColumn id="v_PYR_HH_48_CELL_HH_PYR_v" quantity="PYR_HH/48/CELL_HH_PYR/v"/>
            <OutputColumn id="v_PYR_HH_49_CELL_HH_PYR_v" quantity="PYR_HH/49/CELL_HH_PYR/v"/>
        </OutputFile>

        <OutputFile id="Volts_file__PYR_Izhi" fileName="Sim_HybridTut.PYR_Izhi.v.dat">
            <OutputColumn id="v_PYR_Izhi_0_CELL_Izhi_PYR_v" quantity="PYR_Izhi/0/CELL_Izhi_PYR/v"/>
            <OutputColumn id="v_PYR_Izhi_1_CELL_Izhi_PYR_v" quantity="PYR_Izhi/1/CELL_Izhi_PYR/v"/>
            <OutputColumn id="v_PYR_Izhi_2_CELL_Izhi_PYR_v" quantity="PYR_Izhi/2/CELL_Izhi_PYR/v"/>
            <OutputColumn id="v_PYR_Izhi_3_CELL_Izhi_PYR_v" quantity="PYR_Izhi/3/CELL_Izhi_PYR/v"/>
            <OutputColumn id="v_PYR_Izhi_4_CELL_Izhi_PYR_v" quantity="PYR_Izhi/4/CELL_Izhi_PYR/v"/>
            <OutputColumn id="v_PYR_Izhi_5_CELL_Izhi_PYR_v" quantity="PYR_Izhi/5/CELL_Izhi_PYR/v"/>
            <OutputColumn id="v_PYR_Izhi_6_CELL_Izhi_PYR_v" quantity="PYR_Izhi/6/CELL_Izhi_PYR/v"/>
            <OutputColumn id="v_PYR_Izhi_7_CELL_Izhi_PYR_v" quantity="PYR_Izhi/7/CELL_Izhi_PYR/v"/>
            <OutputColumn id="v_PYR_Izhi_8_CELL_Izhi_PYR_v" quantity="PYR_Izhi/8/CELL_Izhi_PYR/v"/>
            <OutputColumn id="v_PYR_Izhi_9_CELL_Izhi_PYR_v" quantity="PYR_Izhi/9/CELL_Izhi_PYR/v"/>
            <OutputColumn id="v_PYR_Izhi_10_CELL_Izhi_PYR_v" quantity="PYR_Izhi/10/CELL_Izhi_PYR/v"/>
            <OutputColumn id="v_PYR_Izhi_11_CELL_Izhi_PYR_v" quantity="PYR_Izhi/11/CELL_Izhi_PYR/v"/>
            <OutputColumn id="v_PYR_Izhi_12_CELL_Izhi_PYR_v" quantity="PYR_Izhi/12/CELL_Izhi_PYR/v"/>
            <OutputColumn id="v_PYR_Izhi_13_CELL_Izhi_PYR_v" quantity="PYR_Izhi/13/CELL_Izhi_PYR/v"/>
            <OutputColumn id="v_PYR_Izhi_14_CELL_Izhi_PYR_v" quantity="PYR_Izhi/14/CELL_Izhi_PYR/v"/>
            <OutputColumn id="v_PYR_Izhi_15_CELL_Izhi_PYR_v" quantity="PYR_Izhi/15/CELL_Izhi_PYR/v"/>
            <OutputColumn id="v_PYR_Izhi_16_CELL_Izhi_PYR_v" quantity="PYR_Izhi/16/CELL_Izhi_PYR/v"/>
            <OutputColumn id="v_PYR_Izhi_17_CELL_Izhi_PYR_v" quantity="PYR_Izhi/17/CELL_Izhi_PYR/v"/>
            <OutputColumn id="v_PYR_Izhi_18_CELL_Izhi_PYR_v" quantity="PYR_Izhi/18/CELL_Izhi_PYR/v"/>
            <OutputColumn id="v_PYR_Izhi_19_CELL_Izhi_PYR_v" quantity="PYR_Izhi/19/CELL_Izhi_PYR/v"/>
            <OutputColumn id="v_PYR_Izhi_20_CELL_Izhi_PYR_v" quantity="PYR_Izhi/20/CELL_Izhi_PYR/v"/>
            <OutputColumn id="v_PYR_Izhi_21_CELL_Izhi_PYR_v" quantity="PYR_Izhi/21/CELL_Izhi_PYR/v"/>
            <OutputColumn id="v_PYR_Izhi_22_CELL_Izhi_PYR_v" quantity="PYR_Izhi/22/CELL_Izhi_PYR/v"/>
            <OutputColumn id="v_PYR_Izhi_23_CELL_Izhi_PYR_v" quantity="PYR_Izhi/23/CELL_Izhi_PYR/v"/>
            <OutputColumn id="v_PYR_Izhi_24_CELL_Izhi_PYR_v" quantity="PYR_Izhi/24/CELL_Izhi_PYR/v"/>
            <OutputColumn id="v_PYR_Izhi_25_CELL_Izhi_PYR_v" quantity="PYR_Izhi/25/CELL_Izhi_PYR/v"/>
            <OutputColumn id="v_PYR_Izhi_26_CELL_Izhi_PYR_v" quantity="PYR_Izhi/26/CELL_Izhi_PYR/v"/>
            <OutputColumn id="v_PYR_Izhi_27_CELL_Izhi_PYR_v" quantity="PYR_Izhi/27/CELL_Izhi_PYR/v"/>
            <OutputColumn id="v_PYR_Izhi_28_CELL_Izhi_PYR_v" quantity="PYR_Izhi/28/CELL_Izhi_PYR/v"/>
            <OutputColumn id="v_PYR_Izhi_29_CELL_Izhi_PYR_v" quantity="PYR_Izhi/29/CELL_Izhi_PYR/v"/>
            <OutputColumn id="v_PYR_Izhi_30_CELL_Izhi_PYR_v" quantity="PYR_Izhi/30/CELL_Izhi_PYR/v"/>
            <OutputColumn id="v_PYR_Izhi_31_CELL_Izhi_PYR_v" quantity="PYR_Izhi/31/CELL_Izhi_PYR/v"/>
            <OutputColumn id="v_PYR_Izhi_32_CELL_Izhi_PYR_v" quantity="PYR_Izhi/32/CELL_Izhi_PYR/v"/>
            <OutputColumn id="v_PYR_Izhi_33_CELL_Izhi_PYR_v" quantity="PYR_Izhi/33/CELL_Izhi_PYR/v"/>
            <OutputColumn id="v_PYR_Izhi_34_CELL_Izhi_PYR_v" quantity="PYR_Izhi/34/CELL_Izhi_PYR/v"/>
            <OutputColumn id="v_PYR_Izhi_35_CELL_Izhi_PYR_v" quantity="PYR_Izhi/35/CELL_Izhi_PYR/v"/>
            <OutputColumn id="v_PYR_Izhi_36_CELL_Izhi_PYR_v" quantity="PYR_Izhi/36/CELL_Izhi_PYR/v"/>
            <OutputColumn id="v_PYR_Izhi_37_CELL_Izhi_PYR_v" quantity="PYR_Izhi/37/CELL_Izhi_PYR/v"/>
            <OutputColumn id="v_PYR_Izhi_38_CELL_Izhi_PYR_v" quantity="PYR_Izhi/38/CELL_Izhi_PYR/v"/>
            <OutputColumn id="v_PYR_Izhi_39_CELL_Izhi_PYR_v" quantity="PYR_Izhi/39/CELL_Izhi_PYR/v"/>
            <OutputColumn id="v_PYR_Izhi_40_CELL_Izhi_PYR_v" quantity="PYR_Izhi/40/CELL_Izhi_PYR/v"/>
            <OutputColumn id="v_PYR_Izhi_41_CELL_Izhi_PYR_v" quantity="PYR_Izhi/41/CELL_Izhi_PYR/v"/>
            <OutputColumn id="v_PYR_Izhi_42_CELL_Izhi_PYR_v" quantity="PYR_Izhi/42/CELL_Izhi_PYR/v"/>
            <OutputColumn id="v_PYR_Izhi_43_CELL_Izhi_PYR_v" quantity="PYR_Izhi/43/CELL_Izhi_PYR/v"/>
            <OutputColumn id="v_PYR_Izhi_44_CELL_Izhi_PYR_v" quantity="PYR_Izhi/44/CELL_Izhi_PYR/v"/>
            <OutputColumn id="v_PYR_Izhi_45_CELL_Izhi_PYR_v" quantity="PYR_Izhi/45/CELL_Izhi_PYR/v"/>
            <OutputColumn id="v_PYR_Izhi_46_CELL_Izhi_PYR_v" quantity="PYR_Izhi/46/CELL_Izhi_PYR/v"/>
            <OutputColumn id="v_PYR_Izhi_47_CELL_Izhi_PYR_v" quantity="PYR_Izhi/47/CELL_Izhi_PYR/v"/>
            <OutputColumn id="v_PYR_Izhi_48_CELL_Izhi_PYR_v" quantity="PYR_Izhi/48/CELL_Izhi_PYR/v"/>
            <OutputColumn id="v_PYR_Izhi_49_CELL_Izhi_PYR_v" quantity="PYR_Izhi/49/CELL_Izhi_PYR/v"/>
        </OutputFile>

    </Simulation>

</Lems>
