<neuroml xmlns="http://www.neuroml.org/schema/neuroml2"  xmlns:xs="http://www.w3.org/2001/XMLSchema" xmlns:xsi="http://www.w3.org/2001/XMLSchema-instance" xsi:schemaLocation="http://www.neuroml.org/schema/neuroml2 https://raw.github.com/NeuroML/NeuroML2/development/Schemas/NeuroML2/NeuroML_v2beta4.xsd" id="M1">
    <notes>NeuroML 2 file exported from NetPyNE</notes>
    <include href="Izhi2007b.cell.nml"></include>
    <include href="Izhi2007b.cell.nml"></include>
    <include href="Izhi2007b.cell.nml"></include>
    <include href="Izhi2007b.cell.nml"></include>
    <include href="Izhi2007b.cell.nml"></include>
    <include href="Izhi2007b.cell.nml"></include>
    <include href="Izhi2007b.cell.nml"></include>
    <include href="Izhi2007b.cell.nml"></include>
    <include href="Izhi2007b.cell.nml"></include>
    <include href="Izhi2007b.cell.nml"></include>
    <include href="Izhi2007b.cell.nml"></include>
    <include href="Izhi2007b.cell.nml"></include>
    <include href="Izhi2007b.cell.nml"></include>
    <expTwoSynapse id="AMPA" gbase="1uS" erev="0mV" tauDecay="5.3ms" tauRise="0.05ms"/>
    <expTwoSynapse id="NMDA" gbase="1uS" erev="0mV" tauDecay="1.5ms" tauRise="0.15ms"/>
    <expTwoSynapse id="GABAA" gbase="1uS" erev="-80mV" tauDecay="9.1ms" tauRise="0.07ms"/>
    <expTwoSynapse id="GABAB" gbase="1uS" erev="-80mV" tauDecay="9.1ms" tauRise="0.07ms"/>
    <network id="M1">
        <population id="IT_L23" component="Izhi2007b" type="populationList">
            <instance id="0">
                <location x="85.123515222913028" y="349.299000384775297" z="80.336557141106397"/>
            </instance>
            <instance id="1">
                <location x="51.76812388153553" y="401.213241402405799" z="55.879584861756889"/>
            </instance>
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        </population>
        <population id="IT_L4" component="Izhi2007b" type="populationList">
            <instance id="0">
                <location x="28.294179579852642" y="525.738154280037747" z="60.858194368471963"/>
            </instance>
            <instance id="1">
                <location x="72.831055039610987" y="517.848788638963583" z="64.282993236432404"/>
            </instance>
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        </population>
        <population id="IT_L5A" component="Izhi2007b" type="populationList">
            <instance id="0">
                <location x="74.149363764630323" y="570.46404871826303" z="70.94662091231335"/>
            </instance>
            <instance id="1">
                <location x="98.787431484090391" y="633.333948262351896" z="33.868336814779887"/>
            </instance>
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        </population>
        <population id="IT_L5B" component="Izhi2007b" type="populationList">
            <instance id="0">
                <location x="93.498796655696765" y="803.896464884175657" z="13.93239691645498"/>
            </instance>
            <instance id="1">
                <location x="7.573339171871063" y="1006.079450890631279" z="87.75563829867265"/>
            </instance>
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        </population>
        <population id="PT_L5B" component="Izhi2007b" type="populationList">
            <instance id="0">
                <location x="93.498796655696765" y="803.896464884175657" z="13.93239691645498"/>
            </instance>
            <instance id="1">
                <location x="7.573339171871063" y="1006.079450890631279" z="87.75563829867265"/>
            </instance>
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        </population>
        <population id="IT_L6" component="Izhi2007b" type="populationList">
            <instance id="0">
                <location x="45.512806763457533" y="1192.425123715213886" z="13.548720422684269"/>
            </instance>
            <instance id="1">
                <location x="47.376503550273988" y="1252.960230258970569" z="25.56798163585292"/>
            </instance>
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        </population>
        <population id="CT_L6" component="Izhi2007b" type="populationList">
            <instance id="0">
                <location x="45.512806763457533" y="1192.425123715213886" z="13.548720422684269"/>
            </instance>
            <instance id="1">
                <location x="47.376503550273988" y="1252.960230258970569" z="25.56798163585292"/>
            </instance>
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        </population>
        <population id="PV_L23" component="Izhi2007b" type="populationList">
            <instance id="0">
                <location x="50.820782496273289" y="364.283719208120601" z="24.51959284005968"/>
            </instance>
            <instance id="1">
                <location x="84.571501248165106" y="258.147931404484837" z="59.644125000518301"/>
            </instance>
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        </population>
        <population id="SOM_L23" component="Izhi2007b" type="populationList">
            <instance id="0">
                <location x="50.820782496273289" y="364.283719208120601" z="24.51959284005968"/>
            </instance>
            <instance id="1">
                <location x="84.571501248165106" y="258.147931404484837" z="59.644125000518301"/>
            </instance>
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        </population>
        <population id="PV_L5" component="Izhi2007b" type="populationList">
            <instance id="0">
                <location x="44.387364163099249" y="444.390225271621148" z="9.861948510911089"/>
            </instance>
            <instance id="1">
                <location x="15.955487788540012" y="841.026993997277714" z="11.923292125167972"/>
            </instance>
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        </population>
        <population id="SOM_L5" component="Izhi2007b" type="populationList">
            <instance id="0">
                <location x="44.387364163099249" y="444.390225271621148" z="9.861948510911089"/>
            </instance>
            <instance id="1">
                <location x="15.955487788540012" y="841.026993997277714" z="11.923292125167972"/>
            </instance>
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        </population>
        <population id="PV_L6" component="Izhi2007b" type="populationList">
            <instance id="0">
                <location x="46.73556819788093" y="1315.065864976363628" z="98.630434002404925"/>
            </instance>
            <instance id="1">
                <location x="49.014230861351827" y="1238.892703590174733" z="42.45127813324774"/>
            </instance>
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        </population>
        <population id="SOM_L6" component="Izhi2007b" type="populationList">
            <instance id="0">
                <location x="46.73556819788093" y="1315.065864976363628" z="98.630434002404925"/>
            </instance>
            <instance id="1">
                <location x="49.014230861351827" y="1238.892703590174733" z="42.45127813324774"/>
            </instance>
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        </population>
    </network>
</neuroml>
